*Material, name=FGM-L1
    *Density
    1.7500000E+03,
    *Elastic
    1.6250000E+02, 0.278
*Material, name=FGM-L2
    *Density
    1.2500000E+03,
    *Elastic
    3.0750000E+02, 0.292
*Part, name=Virtual_Part
*Node
    1, 1.0, 1.0, 0.0
    2, 0.0, 1.0, 0.0
    3, 0.0, 0.0, 0.0
    4, 1.0, 0.0, 0.0
*Element, type=S4R
    1, 1, 2, 3, 4
*Elset, elset=Virtual
    1
*Solid Section, elset=Virtual, composite
    5.0000000E-01, 3, FGM-L1, 0, Ply-1
    5.0000000E-01, 3, FGM-L2, 0, Ply-2
*End Part
